// SBML level 3 version 2

model main()

  // Compartments:
  compartment A = 1 dimensionless;

  // Species:
  species susceptible in A = 1000/A;  // substance in dimensionless
  species infectious in A = 1e-6/A;  // substance in dimensionless
  species recovered in A = 0;  // substance in dimensionless

  // Parameters:
  beta = 1 dimensionless;
  gamma = 0.13 dimensionless;

  // Reactions:
  infection: susceptible + infectious => 2 infectious; beta*susceptible*infectious/(susceptible + infectious + recovered);  // modifiers: recovered
  recover: infectious => recovered; gamma*infectious;
end
