// SBML level 3 version 2

model main()

  // Compartments:
  compartment countryA = 1 dimensionless;

  // Species:
  species susceptible_countryA_vac0 in countryA = 100000/countryA;  // substance in dimensionless
  species susceptible_countryA_vac1 in countryA = 0;  // substance in dimensionless
  species susceptible_countryA_vac2 in countryA = 0;  // substance in dimensionless
  species infectious_countryA_vac0_virW in countryA = 1e-13/countryA;  // substance in dimensionless
  species infectious_countryA_vac0_virM in countryA = 1e-13/countryA;  // substance in dimensionless
  species infectious_countryA_vac1_virW in countryA = 0;  // substance in dimensionless
  species infectious_countryA_vac1_virM in countryA = 0;  // substance in dimensionless
  species infectious_countryA_vac2_virW in countryA = 0;  // substance in dimensionless
  species infectious_countryA_vac2_virM in countryA = 0;  // substance in dimensionless
  species recovered_countryA_vac0_virW in countryA = 0;  // substance in dimensionless
  species recovered_countryA_vac0_virM in countryA = 0;  // substance in dimensionless
  species recovered_countryA_vac1_virW in countryA = 0;  // substance in dimensionless
  species recovered_countryA_vac1_virM in countryA = 0;  // substance in dimensionless
  species recovered_countryA_vac2_virW in countryA = 0;  // substance in dimensionless
  species recovered_countryA_vac2_virM in countryA = 0;  // substance in dimensionless
  species dead_countryA_vac0_virW in countryA = 0;  // substance in dimensionless
  species dead_countryA_vac0_virM in countryA = 0;  // substance in dimensionless
  species dead_countryA_vac1_virW in countryA = 0;  // substance in dimensionless
  species dead_countryA_vac1_virM in countryA = 0;  // substance in dimensionless
  species dead_countryA_vac2_virW in countryA = 0;  // substance in dimensionless
  species dead_countryA_vac2_virM in countryA = 0;  // substance in dimensionless

  // Parameters:
  lambda = 0.01 dimensionless;
  p_lambda = 0.01 dimensionless;
  gamma = 0.5 dimensionless;
  beta = 2 dimensionless;
  nu_vac1 = 0.01 dimensionless;
  nu_vac2 = 0.01 dimensionless;
  omega_vac1_virW = 0.9 dimensionless;
  delta_vac1_virW = 0.9 dimensionless;
  omega_vac2_virW = 0.6 dimensionless;
  delta_vac2_virW = 0.6 dimensionless;
  omega_vac1_virM = 0.7 dimensionless;
  delta_vac1_virM = 0.6 dimensionless;
  omega_vac2_virM = 0.9 dimensionless;
  delta_vac2_virM = 0.9 dimensionless;
  eta_virW = 1 dimensionless;
  eta_virM = 1.3 dimensionless;

  // Reactions:
  infectious_countryA_vac0_virW_to_recovered_countryA_vac0_virW: infectious_countryA_vac0_virW => recovered_countryA_vac0_virW; (1 - (1 - omega_vac0_virW)*p)*lambda*infectious_countryA_vac0_virW;
  infectious_countryA_vac0_virW_to_dead_countryA_vac0_virW: infectious_countryA_vac0_virW => dead_countryA_vac0_virW; (1 - omega_vac0_virW)*p*lambda*infectious_countryA_vac0_virW;
  infectious_countryA_vac0_virM_to_recovered_countryA_vac0_virM: infectious_countryA_vac0_virM => recovered_countryA_vac0_virM; (1 - (1 - omega_vac0_virM)*p)*lambda*infectious_countryA_vac0_virM;
  infectious_countryA_vac0_virM_to_dead_countryA_vac0_virM: infectious_countryA_vac0_virM => dead_countryA_vac0_virM; (1 - omega_vac0_virM)*p*lambda*infectious_countryA_vac0_virM;
  infectious_countryA_vac1_virW_to_recovered_countryA_vac1_virW: infectious_countryA_vac1_virW => recovered_countryA_vac1_virW; (1 - (1 - omega_vac1_virW)*p)*lambda*infectious_countryA_vac1_virW;
  infectious_countryA_vac1_virW_to_dead_countryA_vac1_virW: infectious_countryA_vac1_virW => dead_countryA_vac1_virW; (1 - omega_vac1_virW)*p*lambda*infectious_countryA_vac1_virW;
  infectious_countryA_vac1_virM_to_recovered_countryA_vac1_virM: infectious_countryA_vac1_virM => recovered_countryA_vac1_virM; (1 - (1 - omega_vac1_virM)*p)*lambda*infectious_countryA_vac1_virM;
  infectious_countryA_vac1_virM_to_dead_countryA_vac1_virM: infectious_countryA_vac1_virM => dead_countryA_vac1_virM; (1 - omega_vac1_virM)*p*lambda*infectious_countryA_vac1_virM;
  infectious_countryA_vac2_virW_to_recovered_countryA_vac2_virW: infectious_countryA_vac2_virW => recovered_countryA_vac2_virW; (1 - (1 - omega_vac2_virW)*p)*lambda*infectious_countryA_vac2_virW;
  infectious_countryA_vac2_virW_to_dead_countryA_vac2_virW: infectious_countryA_vac2_virW => dead_countryA_vac2_virW; (1 - omega_vac2_virW)*p*lambda*infectious_countryA_vac2_virW;
  infectious_countryA_vac2_virM_to_recovered_countryA_vac2_virM: infectious_countryA_vac2_virM => recovered_countryA_vac2_virM; (1 - (1 - omega_vac2_virM)*p)*lambda*infectious_countryA_vac2_virM;
  infectious_countryA_vac2_virM_to_dead_countryA_vac2_virM: infectious_countryA_vac2_virM => dead_countryA_vac2_virM; (1 - omega_vac2_virM)*p*lambda*infectious_countryA_vac2_virM;
  susceptible__countryA_vac0_to_infectious_countryA_vac0_virW: susceptible__countryA_vac0 + => 2; ;
  susceptible__countryA_vac1_to_infectious_countryA_vac0_virW: susceptible__countryA_vac1 + => 2; ;
  susceptible__countryA_vac2_to_infectious_countryA_vac0_virW: susceptible__countryA_vac2 + => 2; ;
  susceptible__countryA_vac0_to_infectious_countryA_vac0_virM: susceptible__countryA_vac0 + => 2; ;
  susceptible__countryA_vac1_to_infectious_countryA_vac0_virM: susceptible__countryA_vac1 + => 2; ;
  susceptible__countryA_vac2_to_infectious_countryA_vac0_virM: susceptible__countryA_vac2 + => 2; ;
  susceptible__countryA_vac0_to_infectious_countryA_vac1_virW: susceptible__countryA_vac0 + => 2; ;
  susceptible__countryA_vac1_to_infectious_countryA_vac1_virW: susceptible__countryA_vac1 + => 2; ;
  susceptible__countryA_vac2_to_infectious_countryA_vac1_virW: susceptible__countryA_vac2 + => 2; ;
  susceptible__countryA_vac0_to_infectious_countryA_vac1_virM: susceptible__countryA_vac0 + => 2; ;
  susceptible__countryA_vac1_to_infectious_countryA_vac1_virM: susceptible__countryA_vac1 + => 2; ;
  susceptible__countryA_vac2_to_infectious_countryA_vac1_virM: susceptible__countryA_vac2 + => 2; ;
  susceptible__countryA_vac0_to_infectious_countryA_vac2_virW: susceptible__countryA_vac0 + => 2; ;
  susceptible__countryA_vac1_to_infectious_countryA_vac2_virW: susceptible__countryA_vac1 + => 2; ;
  susceptible__countryA_vac2_to_infectious_countryA_vac2_virW: susceptible__countryA_vac2 + => 2; ;
  susceptible__countryA_vac0_to_infectious_countryA_vac2_virM: susceptible__countryA_vac0 + => 2; ;
  susceptible__countryA_vac1_to_infectious_countryA_vac2_virM: susceptible__countryA_vac1 + => 2; ;
  susceptible__countryA_vac2_to_infectious_countryA_vac2_virM: susceptible__countryA_vac2 + => 2; ;
  susceptible_countryA_vac0_virW_to_susceptible_countryA_vac0_virW: susceptible_countryA_vac0_virW => susceptible_countryA_vac0_virW; nu_vac0*susceptible_countryA_vac0_virW;
  susceptible_countryA_vac0_virW_to_susceptible_countryA_vac1_virW: susceptible_countryA_vac0_virW => susceptible_countryA_vac1_virW; nu_vac1*susceptible_countryA_vac0_virW;
  susceptible_countryA_vac0_virW_to_susceptible_countryA_vac2_virW: susceptible_countryA_vac0_virW => susceptible_countryA_vac2_virW; nu_vac2*susceptible_countryA_vac0_virW;
  susceptible_countryA_vac0_virM_to_susceptible_countryA_vac0_virM: susceptible_countryA_vac0_virM => susceptible_countryA_vac0_virM; nu_vac0*susceptible_countryA_vac0_virM;
  susceptible_countryA_vac0_virM_to_susceptible_countryA_vac1_virM: susceptible_countryA_vac0_virM => susceptible_countryA_vac1_virM; nu_vac1*susceptible_countryA_vac0_virM;
  susceptible_countryA_vac0_virM_to_susceptible_countryA_vac2_virM: susceptible_countryA_vac0_virM => susceptible_countryA_vac2_virM; nu_vac2*susceptible_countryA_vac0_virM;
  recovered_countryA_vac0_virW_to_recovered_countryA_vac0_virW: recovered_countryA_vac0_virW => recovered_countryA_vac0_virW; nu_vac0*recovered_countryA_vac0_virW;
  recovered_countryA_vac0_virW_to_recovered_countryA_vac1_virW: recovered_countryA_vac0_virW => recovered_countryA_vac1_virW; nu_vac1*recovered_countryA_vac0_virW;
  recovered_countryA_vac0_virW_to_recovered_countryA_vac2_virW: recovered_countryA_vac0_virW => recovered_countryA_vac2_virW; nu_vac2*recovered_countryA_vac0_virW;
  recovered_countryA_vac0_virM_to_recovered_countryA_vac0_virM: recovered_countryA_vac0_virM => recovered_countryA_vac0_virM; nu_vac0*recovered_countryA_vac0_virM;
  recovered_countryA_vac0_virM_to_recovered_countryA_vac1_virM: recovered_countryA_vac0_virM => recovered_countryA_vac1_virM; nu_vac1*recovered_countryA_vac0_virM;
  recovered_countryA_vac0_virM_to_recovered_countryA_vac2_virM: recovered_countryA_vac0_virM => recovered_countryA_vac2_virM; nu_vac2*recovered_countryA_vac0_virM;
end
